# OpenSim document version 40500
Model A01_La_Pre_2017_scaled:
  gravity: 0 -9.80665 0
  length_units: meters
  force_units: N
  credits:
    Delp S.L., Loan J.P., Hoy M.G., Zajac F.E., Topp E.L., Rosen J.M., Thelen D.G., Anderson F.C., Seth A. Notes: 3D, 23 DOF gait model created by D.G. Thelen, Univ. of Wisconsin-Madison, and Ajay Seth, Frank C. Anderson, and Scott L. Delp, Stanford University. Lower extremity joint defintions based on Delp et al. (1990). Low back joint and anthropometry based on Anderson and Pandy (1999, 2001). Planar knee model of Yamaguchi and Zajac (1989). Seth replaced tibia translation constraints with a CustomJoint for the knee and removed the patella to eliminate all kinematic constraints; insertions of the quadrucepts are handled with moving points in the tibia frame as defined by Delp 1990. Number of muscles was reduced by Anderson to improve simulation speed for demonstrations and is not intended to be used in research. License: Creative Commons (CCBY 3.0). You are free to distribute, remix, tweak, and build upon this work, even commercially, as long as you credit us for the original creation. http://creativecommons.org/licenses/by/3.0/ More Information: http://simtk-confluence.stanford.edu:8080/display/OpenSim/Gait+2392+and+2354+Models
  publications:
    Delp, S.L., Loan, J.P., Hoy, M.G., Zajac, F.E., Topp E.L., Rosen, J.M.: An interactive graphics-based model of the lower extremity to study orthopaedic surgical procedures, IEEE Transactions on Biomedical Engineering, vol. 37, pp. 757-767, 1990. Yamaguchi G.T., Zajac F.E.: A planar model of the knee joint to characterize the knee extensor mechanism." J . Biomech. vol. 22. pp. 1-10. 1989. Anderson F.C., Pandy M.G.: A dynamic optimization solution for vertical jumping in three dimensions. Computer Methods in Biomechanics and Biomedical Engineering 2:201-231, 1999. Anderson F.C., Pandy M.G.: Dynamic optimization of human walking. Journal of Biomechanical Engineering 123:381-390, 2001.
  Ground
  BodySet:
    Body pelvis: mass=16.82157 [kg] mass_center=(-0.0812732 0 0) inertia=(0.194035 0.164402 0.109286 0 0 0)
        meshes=(sacrum.vtp pelvis.vtp l_pelvis.vtp)
    Body femur_r: mass=13.28557 mass_center=(0 -0.176145 0) inertia=(0.205331 0.0538247 0.216526 0 0 0)
        meshes=femur_r.vtp
    Body tibia_r: mass=5.295573 mass_center=(0 -0.216307 0) inertia=(0.0966302 0.00977805 0.0979723 0 0 0)
        meshes=(r_tibia.vtp fibula.vtp)
    Body talus_r: mass=0.1428341 mass_center=(0 0 0) inertia=(0.00195419 0.00195419 0.00195419 0 0 0) meshes=talus.vtp
    Body calcn_r: mass=1.785426 mass_center=(0.116968 0.0350905 0) inertia=(0.00273587 0.00762135 0.00801219 0 0 0)
        meshes=foot.vtp
    Body toes_r: mass=0.3093786 mass_center=(0.040471 0.00701809 -0.0204694)
        inertia=(0.000195419 0.000390839 0.000195419 0 0 0) meshes=bofoot.vtp
    Body femur_l: mass=13.28557 mass_center=(0 -0.176145 0) inertia=(0.205331 0.0538247 0.216526 0 0 0)
        meshes=l_femur.vtp
    Body tibia_l_amputated: mass=2.330052 mass_center=(0 -0.0951193 0) inertia=(0.0423716 0.00421798 0.0431385 0 0 0)
        meshes=(tibia_l_TT.vtp fibula_l_TT.vtp)
      PhysicalOffsetFrame tibia_l_amputated_geom_frame_3: socket_parent=.. translation=(0 0 0) [meters]
          orientation=(1.57 0 0) [radians]
      PhysicalOffsetFrame tibia_l_amputated_geom_frame_4: socket_parent=.. translation=(0 0 0) orientation=(0 0 -1.57)
    Body pylon_socket: mass=1.428341 mass_center=(0 -0.0568862 0) inertia=(0.0260748 0.00402626 0.0260748 0 0 0)
        meshes=pylon_socket.stl
      PhysicalOffsetFrame pylon_socket_geom_frame_2: socket_parent=.. translation=(0 0 0) orientation=(1.57 0 0)
      PhysicalOffsetFrame pylon_socket_geom_frame_3: socket_parent=.. translation=(0 0 0) orientation=(0 0 -1.57)
      PhysicalOffsetFrame pylon_socket_geom_frame_5: socket_parent=.. translation=(0 0.0473 0) orientation=(1.57 0 0)
      PhysicalOffsetFrame pylon_socket_geom_frame_6: socket_parent=.. translation=(0 0.0473 0) orientation=(0 0 -1.57)
      PhysicalOffsetFrame pylon_socket_geom_frame_7: socket_parent=.. translation=(0 0.0473 0)
      PhysicalOffsetFrame pylon_socket_geom_frame_8: socket_parent=.. translation=(0 0.0946 0) orientation=(1.57 0 0)
      PhysicalOffsetFrame pylon_socket_geom_frame_9: socket_parent=.. translation=(0 0.0946 0) orientation=(0 0 -1.57)
      PhysicalOffsetFrame pylon_socket_geom_frame_10: socket_parent=.. translation=(0 0.0946 0)
    Body foot1: mass=0.4285022 mass_center=(0.00491267 -0.0274875 0.000233936)
        inertia=(0.000390839 0.000195419 0.000586258 0 0 0) meshes=foot_1.STL
      PhysicalOffsetFrame foot1_geom_frame_2: socket_parent=.. translation=(0 0 0) orientation=(1.57 0 0)
      PhysicalOffsetFrame foot1_geom_frame_3: socket_parent=.. translation=(0 0 0) orientation=(0 0 -1.57)
    Body foot2: mass=0.2856681 mass_center=(0.0184524 -0.00822042 -0.00123648)
        inertia=(0.000195419 0.000390839 0.000195419 0 0 0) meshes=foot.STL
      PhysicalOffsetFrame foot2_geom_frame_2: socket_parent=.. translation=(0 0 0) orientation=(1.57 0 0)
      PhysicalOffsetFrame foot2_geom_frame_3: socket_parent=.. translation=(0 0 0) orientation=(0 0 -1.57)
    Body torso: mass=48.90153 mass_center=(-0.0323533 0.345102 0) inertia=(2.44946 1.25505 2.37786 0 0 0)
        meshes=(hat_spine.vtp hat_jaw.vtp hat_skull.vtp hat_ribs.vtp)
  JointSet:
    CustomJoint ground_pelvis: socket_parent_frame=ground_offset socket_child_frame=pelvis_offset
      Coordinate pelvis_tilt: default_value=0 range=(-1.570796 1.570796) clamped=false
      Coordinate pelvis_list: default_value=0 range=(-1.570796 1.570796) clamped=false
      Coordinate pelvis_rotation: default_value=0 range=(-1.570796 1.570796) clamped=false
      Coordinate pelvis_tx: default_value=0 range=(-5 5) clamped=false
      Coordinate pelvis_ty: default_value=0 range=(-1 2) clamped=false
      Coordinate pelvis_tz: default_value=0 range=(-3 3) clamped=false
      PhysicalOffsetFrame ground_offset: socket_parent=/ground translation=(0 0 0)
      PhysicalOffsetFrame pelvis_offset: socket_parent=/bodyset/pelvis translation=(0 0 0)
      SpatialTransform:
        TransformAxis rotation1: coordinates=pelvis_tilt axis=(0 0 1) LinearFunction(coefficients=1 0)
        TransformAxis rotation2: coordinates=pelvis_list axis=(1 0 0) LinearFunction(coefficients=1 0)
        TransformAxis rotation3: coordinates=pelvis_rotation axis=(0 1 0) LinearFunction(coefficients=1 0)
        TransformAxis translation1: coordinates=pelvis_tx axis=(1 0 0) LinearFunction(coefficients=1 0)
        TransformAxis translation2: coordinates=pelvis_ty axis=(0 1 0) LinearFunction(coefficients=1 0)
        TransformAxis translation3: coordinates=pelvis_tz axis=(0 0 1) LinearFunction(coefficients=1 0)
    CustomJoint hip_r: socket_parent_frame=pelvis_offset socket_child_frame=femur_r_offset
      Coordinate hip_flexion_r: default_value=0 range=(-2.094395 2.094395) clamped=false
      Coordinate hip_adduction_r: default_value=0 range=(-2.094395 2.094395) clamped=false
      Coordinate hip_rotation_r: default_value=0 range=(-2.094395 2.094395) clamped=false
      PhysicalOffsetFrame pelvis_offset: socket_parent=/bodyset/pelvis translation=(-0.0812732 -0.0759853 0.0959874)
      PhysicalOffsetFrame femur_r_offset: socket_parent=/bodyset/femur_r translation=(0 0 0)
      SpatialTransform: axes_held_at_zero=(translation1 translation2 translation3)
        TransformAxis rotation1: coordinates=hip_flexion_r axis=(0 0 1) LinearFunction(coefficients=1 0)
        TransformAxis rotation2: coordinates=hip_adduction_r axis=(1 0 0) LinearFunction(coefficients=1 0)
        TransformAxis rotation3: coordinates=hip_rotation_r axis=(0 1 0) LinearFunction(coefficients=1 0)
    CustomJoint knee_r: socket_parent_frame=femur_r_offset socket_child_frame=tibia_r_offset
      Coordinate knee_angle_r: default_value=0 range=(-2.094395 0.1745329) clamped=false
      PhysicalOffsetFrame femur_r_offset: socket_parent=/bodyset/femur_r translation=(0 0 0)
      PhysicalOffsetFrame tibia_r_offset: socket_parent=/bodyset/tibia_r translation=(0 0 0)
      SpatialTransform: axes_held_at_zero=(rotation2 rotation3 translation3)
        TransformAxis rotation1: coordinates=knee_angle_r axis=(0 0 1) LinearFunction(coefficients=1 0)
        TransformAxis translation1: coordinates=knee_angle_r axis=(1 0 0)
          MultiplierFunction: scale=1.036147
            SimmSpline: x=(-2.0944 -1.74533 -1.39626 -1.0472 -0.698132 -0.349066 -0.174533 0.197344 0.337395 0.490178 1.52146 2.0944)
                y=(-0.0032 0.00179 0.00411 0.0041 0.00212 -0.001 -0.0031 -0.005227 -0.005435 -0.005574 -0.005435 -0.00525)
        TransformAxis translation2: coordinates=knee_angle_r axis=(0 1 0)
          MultiplierFunction: scale=1.036147
            SimmSpline: x=(-2.0944 -1.22173 -0.523599 -0.349066 -0.174533 0.159149 2.0944)
                y=(-0.4226 -0.4082 -0.399 -0.3976 -0.3966 -0.395264 -0.396)
    CustomJoint ankle_r: socket_parent_frame=tibia_r_offset socket_child_frame=talus_r_offset
      Coordinate ankle_angle_r: default_value=0 range=(-1.570796 1.570796) clamped=false
      PhysicalOffsetFrame tibia_r_offset: socket_parent=/bodyset/tibia_r translation=(0 -0.498189 0)
      PhysicalOffsetFrame talus_r_offset: socket_parent=/bodyset/talus_r translation=(0 0 0)
      SpatialTransform: axes_held_at_zero=(rotation2 rotation3 translation1 translation2 translation3)
        TransformAxis rotation1: coordinates=ankle_angle_r axis=(-0.1050135 -0.1740224 0.9791263)
            LinearFunction(coefficients=1 0)
    CustomJoint subtalar_r: socket_parent_frame=talus_r_offset socket_child_frame=calcn_r_offset
      Coordinate subtalar_angle_r: default_value=0 range=(-1.570796 1.570796) clamped=false
      PhysicalOffsetFrame talus_r_offset: socket_parent=/bodyset/talus_r translation=(-0.0570454 -0.0490682 0.00926388)
      PhysicalOffsetFrame calcn_r_offset: socket_parent=/bodyset/calcn_r translation=(0 0 0)
      SpatialTransform: axes_held_at_zero=(rotation2 rotation3 translation1 translation2 translation3)
        TransformAxis rotation1: coordinates=subtalar_angle_r axis=(0.7871796 0.6047475 -0.1209495)
            LinearFunction(coefficients=1 0)
    CustomJoint mtp_r: socket_parent_frame=calcn_r_offset socket_child_frame=toes_r_offset
      Coordinate mtp_angle_r: default_value=0 range=(-1.570796 1.570796) clamped=false
      PhysicalOffsetFrame calcn_r_offset: socket_parent=/bodyset/calcn_r translation=(0.209139 -0.00233936 0.00126326)
      PhysicalOffsetFrame toes_r_offset: socket_parent=/bodyset/toes_r translation=(0 0 0)
      SpatialTransform: axes_held_at_zero=(rotation2 rotation3 translation1 translation2 translation3)
        TransformAxis rotation1: coordinates=mtp_angle_r axis=(-0.5809544 0 0.8139361) LinearFunction(coefficients=1 0)
    CustomJoint hip_l: socket_parent_frame=pelvis_offset socket_child_frame=femur_l_offset
      Coordinate hip_flexion_l: default_value=0 range=(-2.094395 2.094395) clamped=false
      Coordinate hip_adduction_l: default_value=0 range=(-2.094395 2.094395) clamped=false
      Coordinate hip_rotation_l: default_value=0 range=(-2.094395 2.094395) clamped=false
      PhysicalOffsetFrame pelvis_offset: socket_parent=/bodyset/pelvis translation=(-0.0812732 -0.0759853 -0.0959874)
      PhysicalOffsetFrame femur_l_offset: socket_parent=/bodyset/femur_l translation=(0 0 0)
      SpatialTransform: axes_held_at_zero=(translation1 translation2 translation3)
        TransformAxis rotation1: coordinates=hip_flexion_l axis=(0 0 1) LinearFunction(coefficients=1 0)
        TransformAxis rotation2: coordinates=hip_adduction_l axis=(-1 0 0) LinearFunction(coefficients=1 0)
        TransformAxis rotation3: coordinates=hip_rotation_l axis=(0 -1 0) LinearFunction(coefficients=1 0)
    CustomJoint knee_l: socket_parent_frame=femur_l_offset socket_child_frame=tibia_l_amputated_offset
      Coordinate knee_angle_l: default_value=0 range=(0.1745329 2.094395) clamped=false
      PhysicalOffsetFrame femur_l_offset: socket_parent=/bodyset/femur_l translation=(0 0 0)
      PhysicalOffsetFrame tibia_l_amputated_offset: socket_parent=/bodyset/tibia_l_amputated translation=(0 0 0)
      SpatialTransform: axes_held_at_zero=(rotation2 rotation3 translation3)
        TransformAxis rotation1: coordinates=knee_angle_l axis=(0 0 -1) LinearFunction(coefficients=1 0)
        TransformAxis translation1: coordinates=knee_angle_l axis=(1 0 0)
          MultiplierFunction: scale=1.036147
            SimmSpline: x=(-2.0944 -1.74533 -1.39626 -1.0472 -0.698132 -0.349066 -0.174533 0.197344 0.337395 0.490178 1.52146 2.0944)
                y=(-0.0032 0.00179 0.00411 0.0041 0.00212 -0.001 -0.0031 -0.005227 -0.005435 -0.005574 -0.005435 -0.00525)
        TransformAxis translation2: coordinates=knee_angle_l axis=(0 1 0)
          MultiplierFunction: scale=1.036147
            SimmSpline: x=(-2.0944 -1.22173 -0.523599 -0.349066 -0.174533 0.159149 2.0944)
                y=(-0.4226 -0.4082 -0.399 -0.3976 -0.3966 -0.395264 -0.396)
    CustomJoint socket: socket_parent_frame=pylon_socket_offset socket_child_frame=tibia_l_amputated_offset
      Coordinate socket_flexion: default_value=0 range=(-1.2 1.2) clamped=true
      Coordinate socket_adduction: default_value=0 range=(-1 1) clamped=false
      Coordinate socket_rotation: default_value=0 range=(-2 2) clamped=false
      Coordinate socket_tx: default_value=0 range=(-0.02 0.02) clamped=false locked=true
      Coordinate socket_ty: default_value=3.095684e-17 range=(-0.02 0.02) clamped=false
      Coordinate socket_tz: default_value=0 range=(-0.02 0.02) clamped=false locked=true
      PhysicalOffsetFrame tibia_l_amputated_offset: socket_parent=/bodyset/tibia_l_amputated
          translation=(0.00579289 -0.218971 0)
      PhysicalOffsetFrame pylon_socket_offset: socket_parent=/bodyset/pylon_socket translation=(-0.007 -0.003 0.011)
          orientation=(-0.02 0 0)
      SpatialTransform:
        TransformAxis rotation1: coordinates=socket_flexion axis=(0 0 1) LinearFunction(coefficients=1 0)
        TransformAxis rotation2: coordinates=socket_adduction axis=(1 0 0) LinearFunction(coefficients=1 0)
        TransformAxis rotation3: coordinates=socket_rotation axis=(0 1 0) LinearFunction(coefficients=1 0)
        TransformAxis translation1: coordinates=socket_tx axis=(1 0 0) LinearFunction(coefficients=1 0)
        TransformAxis translation2: coordinates=socket_ty axis=(0 1 0) LinearFunction(coefficients=1 0)
        TransformAxis translation3: coordinates=socket_tz axis=(0 0 1) LinearFunction(coefficients=1 0)
    CustomJoint pros_ankle: socket_parent_frame=pylon_socket_offset socket_child_frame=foot1_offset
      Coordinate pros_ankle_rx: default_value=0 range=(-5 5) clamped=false locked=true
      Coordinate pros_ankle_ry: default_value=0 range=(-5 5) clamped=false locked=true
      Coordinate pros_ankle_rz: default_value=0 range=(-15 15) clamped=false locked=true
      Coordinate pros_ankle_tx: default_value=0 range=(-0.02 0.02) clamped=false locked=true
      Coordinate pros_ankle_ty: default_value=0 range=(-0.02 0.02) clamped=false locked=true
      Coordinate pros_ankle_tz: default_value=0 range=(-0.02 0.02) clamped=false locked=true
      PhysicalOffsetFrame pylon_socket_offset: socket_parent=/bodyset/pylon_socket translation=(0 -0.25257 0)
          orientation=(0 0.06 -0.015)
      PhysicalOffsetFrame foot1_offset: socket_parent=/bodyset/foot1 translation=(0 0 0)
      SpatialTransform:
        TransformAxis rotation1: coordinates=pros_ankle_rx axis=(0 0 1) LinearFunction(coefficients=1 0)
        TransformAxis rotation2: coordinates=pros_ankle_ry axis=(1 0 0) LinearFunction(coefficients=1 0)
        TransformAxis rotation3: coordinates=pros_ankle_rz axis=(0 1 0) LinearFunction(coefficients=1 0)
        TransformAxis translation1: coordinates=pros_ankle_tx axis=(1 0 0) LinearFunction(coefficients=1 0)
        TransformAxis translation2: coordinates=pros_ankle_ty axis=(0 1 0) LinearFunction(coefficients=1 0)
        TransformAxis translation3: coordinates=pros_ankle_tz axis=(0 0 1) LinearFunction(coefficients=1 0)
    PinJoint foot_flex: socket_parent_frame=foot1_offset socket_child_frame=foot2_offset
      Coordinate foot_flex: default_value=0 range=(-1.57 1.57) clamped=false
      PhysicalOffsetFrame foot1_offset: socket_parent=/bodyset/foot1 translation=(0.0374298 -0.0491267 0)
      PhysicalOffsetFrame foot2_offset: socket_parent=/bodyset/foot2 translation=(0 0 0)
    CustomJoint back: socket_parent_frame=pelvis_offset socket_child_frame=torso_offset
      Coordinate lumbar_extension: default_value=0 range=(-1.570796 1.570796) clamped=false
      Coordinate lumbar_bending: default_value=0 range=(-1.570796 1.570796) clamped=false
      Coordinate lumbar_rotation: default_value=0 range=(-1.570796 1.570796) clamped=false
      PhysicalOffsetFrame pelvis_offset: socket_parent=/bodyset/pelvis translation=(-0.11576 0.0936883 0)
      PhysicalOffsetFrame torso_offset: socket_parent=/bodyset/torso translation=(0 0 0)
      SpatialTransform: axes_held_at_zero=(translation1 translation2 translation3)
        TransformAxis rotation1: coordinates=lumbar_extension axis=(0 0 1) LinearFunction(coefficients=1 0)
        TransformAxis rotation2: coordinates=lumbar_bending axis=(1 0 0) LinearFunction(coefficients=1 0)
        TransformAxis rotation3: coordinates=lumbar_rotation axis=(0 1 0) LinearFunction(coefficients=1 0)
  ForceSet:
    Thelen2003Muscle [values shared by the 51 below unless stated]: optimal_force=1 max_contraction_velocity=10
        FmaxTendonStrain=0.033 FmaxMuscleStrain=0.6 KshapeActive=0.5 KshapePassive=4 Af=0.3 Flen=1.8
        activation_time_constant=0.01 [seconds] deactivation_time_constant=0.04 [seconds]
    Thelen2003Muscle glut_med1_r: max_isometric_force=1119 optimal_fiber_length=0.06015993
        tendon_slack_length=0.0877098 pennation_angle_at_optimal=0.1396263 [radians]
      PathPoint P1: pelvis (-0.0469016 0.0349463 0.138981)
      PathPoint P2: femur_r (-0.022588 -0.0121229 0.0575062)
    Thelen2003Muscle glut_med2_r: max_isometric_force=873 optimal_fiber_length=0.09492605
        tendon_slack_length=0.05953942 pennation_angle_at_optimal=0
      PathPoint P1: pelvis (-0.0982865 0.051155 0.0880555)
      PathPoint P2: femur_r (-0.0267326 -0.00600965 0.054605)
    Thelen2003Muscle glut_med3_r: max_isometric_force=1000 optimal_fiber_length=0.07227372
        tendon_slack_length=0.05929578 pennation_angle_at_optimal=0.3316126
      PathPoint P1: pelvis (-0.14059 0.0120703 0.0744909)
      PathPoint P2: femur_r (-0.0320169 -0.00486989 0.0536724)
    Thelen2003Muscle bifemlh_r: max_isometric_force=2700 optimal_fiber_length=0.1138986 tendon_slack_length=0.3406508
        pennation_angle_at_optimal=0
      PathPoint P1: pelvis (-0.144797 -0.117909 0.0798248)
      PathPoint P2: tibia_r (-0.0348732 -0.0417088 0.0340969)
      PathPoint P3: tibia_r (-0.0271107 -0.0652279 0.0397392)
    Thelen2003Muscle bifemsh_r: max_isometric_force=804 optimal_fiber_length=0.1847408 tendon_slack_length=0.09504006
        pennation_angle_at_optimal=0.4014257
      PathPoint P1: femur_r (0.00518074 -0.218731 0.0242458)
      PathPoint P2: tibia_r (-0.0348732 -0.0417088 0.0340969)
      PathPoint P3: tibia_r (-0.0271107 -0.0652279 0.0397392)
    Thelen2003Muscle sar_r: max_isometric_force=156 optimal_fiber_length=0.557747 tendon_slack_length=0.107259
        pennation_angle_at_optimal=0
      PathPoint P1: pelvis (-0.0175881 -0.00149442 0.142774)
      PathPoint P2: femur_r (-0.00310844 -0.369697 -0.0436218)
      PathPoint P3: tibia_r (-0.00648804 -0.0485444 -0.0462273)
      PathPoint P4: tibia_r (0.00695147 -0.0682402 -0.0443735)
      PathPoint P5: tibia_r (0.0281534 -0.0973205 -0.0291962)
    Thelen2003Muscle add_mag2_r: max_isometric_force=2343 optimal_fiber_length=0.1235676 tendon_slack_length=0.1225464
        pennation_angle_at_optimal=0.05235988
      PathPoint P1: pelvis (-0.0955276 -0.137026 0.0354061)
      PathPoint P2: femur_r (0.00559519 -0.23676 0.0235205)
    Thelen2003Muscle tfl_r: max_isometric_force=233 optimal_fiber_length=0.1011349 tendon_slack_length=0.4524455
        pennation_angle_at_optimal=0.05235988
      PathPoint P1: pelvis (-0.035751 0.0246004 0.142659)
      PathPoint P2: femur_r (0.0304627 -0.103097 0.061858)
      PathPoint P3: femur_r (0.00559519 -0.419536 0.0369905)
      PathPoint P4: tibia_r (0.00695147 -0.0564227 0.0344098)
    Thelen2003Muscle pect_r: max_isometric_force=266 optimal_fiber_length=0.1066373 tendon_slack_length=0.03519032
        pennation_angle_at_optimal=0
      PathPoint P1: pelvis (-0.0495456 -0.0882855 0.0518447)
      PathPoint P2: femur_r (-0.012641 -0.0851713 0.0262145)
    Thelen2003Muscle grac_r: max_isometric_force=162 optimal_fiber_length=0.3695839 tendon_slack_length=0.1322942
        pennation_angle_at_optimal=0.05235988
      PathPoint P1: pelvis (-0.0850782 -0.136452 0.0321184)
      ConditionalPathPoint P2: tibia_r (-0.0307834 -0.0369586 -0.0437247)
          socket_coordinate=/jointset/knee_r/knee_angle_r range=(-0.436332 0.174533) [radians]
      PathPoint P3: tibia_r (-0.0225112 -0.0597015 -0.0414771)
      PathPoint P4: tibia_r (0.00695147 -0.0968571 -0.0264156)
    Thelen2003Muscle glut_max1_r: max_isometric_force=573 optimal_fiber_length=0.1578903 tendon_slack_length=0.1389879
        pennation_angle_at_optimal=0.08726646
      PathPoint P1: pelvis (-0.137371 0.0703525 0.0804685)
      PathPoint P2: pelvis (-0.148407 0.00137946 0.10185)
      PathPoint P3: femur_r (-0.0473519 -0.0256965 0.040617)
      PathPoint P4: femur_r (-0.0287013 -0.0586459 0.0486989)
    Thelen2003Muscle glut_max2_r: max_isometric_force=819 optimal_fiber_length=0.1612917 tendon_slack_length=0.1393473
        pennation_angle_at_optimal=0
      PathPoint P1: pelvis (-0.155074 0.0202321 0.0647197)
      PathPoint P2: pelvis (-0.158178 -0.0597766 0.105069)
      PathPoint P3: femur_r (-0.0441399 -0.0549158 0.0303591)
      PathPoint P4: femur_r (-0.0161639 -0.105273 0.0434146)
    Thelen2003Muscle glut_max3_r: max_isometric_force=552 optimal_fiber_length=0.1580726 tendon_slack_length=0.1591704
        pennation_angle_at_optimal=0.08726646
      PathPoint P1: pelvis (-0.17887 -0.0360959 0.00666739)
      PathPoint P2: pelvis (-0.175766 -0.120933 0.0463269)
      PathPoint P3: femur_r (-0.0309808 -0.107863 0.013988)
      PathPoint P4: femur_r (-0.00621688 -0.147029 0.0425857)
    Thelen2003Muscle iliacus_r: max_isometric_force=1073 optimal_fiber_length=0.1116921 tendon_slack_length=0.1116921
        pennation_angle_at_optimal=0.1221731
      PathPoint P1: pelvis (-0.0774797 0.0419586 0.0981716)
      PathPoint P2: pelvis (-0.0296584 -0.0632253 0.0932285)
      ConditionalPathPoint P3: pelvis (-0.033107 -0.0925388 0.0938033) socket_coordinate=/jointset/hip_r/hip_flexion_r
          range=(-1.5708 0.785398)
      PathPoint P4: femur_r (0.00176145 -0.0562628 0.00590604)
      PathPoint P5: femur_r (-0.0199976 -0.0643447 0.0133663)
    Thelen2003Muscle psoas_r: max_isometric_force=1113 optimal_fiber_length=0.1125747 tendon_slack_length=0.1801195
        pennation_angle_at_optimal=0.1396263
      PathPoint P1: pelvis (-0.0743759 0.101965 0.033222)
      PathPoint P2: pelvis (-0.0273593 -0.0655244 0.0872509)
      ConditionalPathPoint P3: pelvis (-0.033107 -0.0925388 0.0938033) socket_coordinate=/jointset/hip_r/hip_flexion_r
          range=(-1.5708 0.785398)
      PathPoint P4: femur_r (0.00165784 -0.0525327 0.00393736)
      PathPoint P5: femur_r (-0.0194796 -0.061858 0.0107759)
    Thelen2003Muscle quad_fem_r: max_isometric_force=381 optimal_fiber_length=0.06000208 tendon_slack_length=0.02666759
        pennation_angle_at_optimal=0
      PathPoint P1: pelvis (-0.131394 -0.132313 0.0597766)
      PathPoint P2: femur_r (-0.0394772 -0.0371977 0.037923)
    Thelen2003Muscle gem_r: max_isometric_force=164 optimal_fiber_length=0.02628054 tendon_slack_length=0.04270588
        pennation_angle_at_optimal=0
      PathPoint P1: pelvis (-0.130244 -0.0942631 0.0820779)
      PathPoint P2: femur_r (-0.0147133 -0.00341929 0.0459013)
    Thelen2003Muscle peri_r: max_isometric_force=444 optimal_fiber_length=0.02928814 tendon_slack_length=0.1295437
        pennation_angle_at_optimal=0.1745329
      PathPoint P1: pelvis (-0.160477 0.000344865 0.0270144)
      PathPoint P2: pelvis (-0.137141 -0.0317276 0.0755254)
      PathPoint P3: femur_r (-0.015335 -0.00373013 0.0452796)
    Thelen2003Muscle rect_fem_r: max_isometric_force=1169 optimal_fiber_length=0.1185546 tendon_slack_length=0.3223854
        pennation_angle_at_optimal=0.08726646
      PathPoint P1: pelvis (-0.0339117 -0.035751 0.111276)
      ConditionalPathPoint P2: femur_r (0.0346073 -0.417567 0.00196868) socket_coordinate=/jointset/knee_r/knee_angle_r
          range=(-2.61799 -1.45997)
      MovingPathPoint P3: tibia_r socket_x_coordinate=/jointset/knee_r/knee_angle_r
          socket_y_coordinate=/jointset/knee_r/knee_angle_r socket_z_coordinate=/jointset/knee_r/knee_angle_r
        x_location: MultiplierFunction: scale=1.158578
          SimmSpline: x=(-2.0944 -1.99997 -1.5708 -1.45752 -1.39626 -1.0472 -0.698132 -0.526391 -0.349066 -0.174533 0 0.00017453 0.00034907 0.0279253 0.0872665 0.174533 2.0944)
              y=(0.0155805 0.0179938 0.0275081 0.0296564 0.0307615 0.0365695 0.0422074 0.0450902 0.048391 0.0534299 0.0617576 0.0617669 0.0617762 0.0633083 0.066994 0.0733035 0.0573481)
        y_location: MultiplierFunction: scale=1.158578
          SimmSpline: x=(-2.0944 -1.99997 -1.5708 -1.45752 -1.39626 -1.0472 -0.698132 -0.526391 -0.349066 -0.174533 0 0.00017453 0.00034907 0.0279253 0.0872665 0.174533 2.0944)
              y=(0.0234116 0.0237613 0.0251141 0.0252795 0.0253146 0.0249184 0.0242373 0.0238447 0.0234197 0.0227644 0.020984 0.0209814 0.0209788 0.0205225 0.0191754 0.0159554 -0.0673774)
        z_location: MultiplierFunction: scale=1.158578
          SimmSpline: x=(-2.0944 0.1745) y=(0.0014 0.0014)
    Thelen2003Muscle vas_int_r: max_isometric_force=5000 optimal_fiber_length=0.1095702 tendon_slack_length=0.1187863
        pennation_angle_at_optimal=0.05235988
      PathPoint P1: femur_r (0.0300483 -0.199355 0.0321206)
      PathPoint P2: femur_r (0.0347109 -0.215933 0.0295302)
      ConditionalPathPoint P3: femur_r (0.0355398 -0.417567 0.00569881) socket_coordinate=/jointset/knee_r/knee_angle_r
          range=(-2.61799 -1.42)
      MovingPathPoint P4: tibia_r socket_x_coordinate=/jointset/knee_r/knee_angle_r
          socket_y_coordinate=/jointset/knee_r/knee_angle_r socket_z_coordinate=/jointset/knee_r/knee_angle_r
        x_location: MultiplierFunction: scale=1.158578
          SimmSpline: x=(-2.0944 -1.99997 -1.5708 -1.45752 -1.39626 -1.0472 -0.698132 -0.526391 -0.349066 -0.174533 0 0.00017453 0.00034907 0.0279253 0.0872665 0.174533 2.0944)
              y=(0.0082733 0.0106866 0.0202042 0.022353 0.0234583 0.0292715 0.0349465 0.037871 0.0412569 0.0465287 0.0554632 0.0554735 0.0554837 0.0571717 0.061272 0.0684368 0.0648818)
        y_location: MultiplierFunction: scale=1.158578
          SimmSpline: x=(-2.0944 -1.99997 -1.5708 -1.45752 -1.39626 -1.0472 -0.698132 -0.526391 -0.349066 -0.174533 0 0.00017453 0.00034907 0.0279253 0.0872665 0.174533 2.0944)
              y=(0.025599 0.0259487 0.0273124 0.0274796 0.0275151 0.0271363 0.0265737 0.0263073 0.0261187 0.0260129 0.0252923 0.0252911 0.0252898 0.0250526 0.0242191 0.0218288 -0.0685706)
        z_location: MultiplierFunction: scale=1.158578
          SimmSpline: x=(-2.0944 2.0944) y=(0.0018 0.0018)
    Thelen2003Muscle med_gas_r: max_isometric_force=2500 optimal_fiber_length=0.1040979 tendon_slack_length=0.4163916
        pennation_angle_at_optimal=0.296706
      PathPoint P1: femur_r (-0.0196868 -0.407102 -0.0243495)
      ConditionalPathPoint P2: femur_r (-0.0310844 -0.416738 -0.0267326)
          socket_coordinate=/jointset/knee_r/knee_angle_r range=(-0.785398 0.174533)
      PathPoint P3: calcn_r (0 0.0362601 -0.00619932)
    Thelen2003Muscle soleus_r: max_isometric_force=4000 optimal_fiber_length=0.05796427 tendon_slack_length=0.2898214
        pennation_angle_at_optimal=0.4363323
      PathPoint P1: tibia_r (-0.00278059 -0.17761 0.0082259)
      PathPoint P2: calcn_r (0 0.0362601 -0.00619932)
    Thelen2003Muscle tib_post_r: max_isometric_force=3600 optimal_fiber_length=0.03596091 tendon_slack_length=0.3596091
        pennation_angle_at_optimal=0.2094395
      PathPoint P1: tibia_r (-0.0108906 -0.156176 0.0022013)
      PathPoint P2: tibia_r (-0.0166835 -0.46934 -0.0265314)
      PathPoint P3: calcn_r (0.0487757 0.0390674 -0.0334529)
      PathPoint P4: calcn_r (0.0902995 0.0185979 -0.0328681)
    Thelen2003Muscle tib_ant_r: max_isometric_force=3000 optimal_fiber_length=0.1137447 tendon_slack_length=0.2588271
        pennation_angle_at_optimal=0.08726646
      PathPoint P1: tibia_r (0.0207385 -0.188153 0.0133236)
      PathPoint P2: tibia_r (0.0381172 -0.457754 -0.0205068)
      PathPoint P3: calcn_r (0.136385 0.0208203 -0.0356753)
    Thelen2003Muscle glut_med1_l: max_isometric_force=1119 optimal_fiber_length=0.06015993
        tendon_slack_length=0.0877098 pennation_angle_at_optimal=0.1396263
      PathPoint P1: pelvis (-0.0469016 0.0349463 -0.138981)
      PathPoint P2: femur_l (-0.022588 -0.0121229 -0.0575062)
    Thelen2003Muscle glut_med2_l: max_isometric_force=873 optimal_fiber_length=0.09492605
        tendon_slack_length=0.05953942 pennation_angle_at_optimal=0
      PathPoint P1: pelvis (-0.0982865 0.051155 -0.0880555)
      PathPoint P2: femur_l (-0.0267326 -0.00600965 -0.054605)
    Thelen2003Muscle glut_med3_l: max_isometric_force=1000 optimal_fiber_length=0.07227372
        tendon_slack_length=0.05929578 pennation_angle_at_optimal=0.3316126
      PathPoint P1: pelvis (-0.14059 0.0120703 -0.0744909)
      PathPoint P2: femur_l (-0.0320169 -0.00486989 -0.0536724)
    Thelen2003Muscle bifemlh_l: max_isometric_force=2700 optimal_fiber_length=0.1138986 tendon_slack_length=0.3406508
        pennation_angle_at_optimal=0
      PathPoint P1: pelvis (-0.144797 -0.117909 -0.0798248)
      PathPoint P2: tibia_l_amputated (-0.0348732 -0.0417088 -0.0340969)
      PathPoint P3: tibia_l_amputated (-0.0271107 -0.0652279 -0.0397392)
    Thelen2003Muscle bifemsh_l: max_isometric_force=804 optimal_fiber_length=0.1847408 tendon_slack_length=0.09504006
        pennation_angle_at_optimal=0.4014257
      PathPoint P1: femur_l (0.00518074 -0.218731 -0.0242458)
      PathPoint P2: tibia_l_amputated (-0.0348732 -0.0417088 -0.0340969)
      PathPoint P3: tibia_l_amputated (-0.0271107 -0.0652279 -0.0397392)
    Thelen2003Muscle sar_l: max_isometric_force=156 optimal_fiber_length=0.557747 tendon_slack_length=0.107259
        pennation_angle_at_optimal=0
      PathPoint P1: pelvis (-0.0175881 -0.00149442 -0.142774)
      PathPoint P2: femur_l (-0.00310844 -0.369697 0.0436218)
      PathPoint P3: tibia_l_amputated (-0.00648804 -0.0485444 0.0462273)
      PathPoint P4: tibia_l_amputated (0.00695147 -0.0682402 0.0443735)
      PathPoint P5: tibia_l_amputated (0.0281534 -0.0973205 0.0291962)
    Thelen2003Muscle add_mag2_l: max_isometric_force=2343 optimal_fiber_length=0.1235676 tendon_slack_length=0.1225464
        pennation_angle_at_optimal=0.05235988
      PathPoint P1: pelvis (-0.0955276 -0.137026 -0.0354061)
      PathPoint P2: femur_l (0.00559519 -0.23676 -0.0235205)
    Thelen2003Muscle tfl_l: max_isometric_force=233 optimal_fiber_length=0.1011349 tendon_slack_length=0.4524455
        pennation_angle_at_optimal=0.05235988
      PathPoint P1: pelvis (-0.035751 0.0246004 -0.142659)
      PathPoint P2: femur_l (0.0304627 -0.103097 -0.061858)
      PathPoint P3: femur_l (0.00559519 -0.419536 -0.0369905)
      PathPoint P4: tibia_l_amputated (0.00695147 -0.0564227 -0.0344098)
    Thelen2003Muscle pect_l: max_isometric_force=266 optimal_fiber_length=0.1066373 tendon_slack_length=0.03519032
        pennation_angle_at_optimal=0
      PathPoint P1: pelvis (-0.0495456 -0.0882855 -0.0518447)
      PathPoint P2: femur_l (-0.012641 -0.0851713 -0.0262145)
    Thelen2003Muscle grac_l: max_isometric_force=162 optimal_fiber_length=0.3695839 tendon_slack_length=0.1322942
        pennation_angle_at_optimal=0.05235988
      PathPoint P1: pelvis (-0.0850782 -0.136452 -0.0321184)
      ConditionalPathPoint P2: tibia_l_amputated (-0.0307834 -0.0369586 0.0437247)
          socket_coordinate=/jointset/knee_l/knee_angle_l range=(-0.436332 0.174533)
      PathPoint P3: tibia_l_amputated (-0.0225112 -0.0597015 0.0414771)
      PathPoint P4: tibia_l_amputated (0.00695147 -0.0968571 0.0264156)
    Thelen2003Muscle glut_max1_l: max_isometric_force=573 optimal_fiber_length=0.1578903 tendon_slack_length=0.1389879
        pennation_angle_at_optimal=0.08726646
      PathPoint P1: pelvis (-0.137371 0.0703525 -0.0804685)
      PathPoint P2: pelvis (-0.148407 0.00137946 -0.10185)
      PathPoint P3: femur_l (-0.0473519 -0.0256965 -0.040617)
      PathPoint P4: femur_l (-0.0287013 -0.0586459 -0.0486989)
    Thelen2003Muscle glut_max2_l: max_isometric_force=819 optimal_fiber_length=0.1612917 tendon_slack_length=0.1393473
        pennation_angle_at_optimal=0
      PathPoint P1: pelvis (-0.155074 0.0202321 -0.0647197)
      PathPoint P2: pelvis (-0.158178 -0.0597766 -0.105069)
      PathPoint P3: femur_l (-0.0441399 -0.0549158 -0.0303591)
      PathPoint P4: femur_l (-0.0161639 -0.105273 -0.0434146)
    Thelen2003Muscle glut_max3_l: max_isometric_force=552 optimal_fiber_length=0.1580726 tendon_slack_length=0.1591704
        pennation_angle_at_optimal=0.08726646
      PathPoint P1: pelvis (-0.17887 -0.0360959 -0.00666739)
      PathPoint P2: pelvis (-0.175766 -0.120933 -0.0463269)
      PathPoint P3: femur_l (-0.0309808 -0.107863 -0.013988)
      PathPoint P4: femur_l (-0.00621688 -0.147029 -0.0425857)
    Thelen2003Muscle iliacus_l: max_isometric_force=1073 optimal_fiber_length=0.1116921 tendon_slack_length=0.1116921
        pennation_angle_at_optimal=0.1221731
      PathPoint P1: pelvis (-0.0774797 0.0419586 -0.0981716)
      PathPoint P2: pelvis (-0.0296584 -0.0632253 -0.0932285)
      ConditionalPathPoint P3: pelvis (-0.033107 -0.0925388 -0.0938033) socket_coordinate=/jointset/hip_l/hip_flexion_l
          range=(-1.5708 0.785398)
      PathPoint P4: femur_l (0.00176145 -0.0562628 -0.00590604)
      PathPoint P5: femur_l (-0.0199976 -0.0643447 -0.0133663)
    Thelen2003Muscle psoas_l: max_isometric_force=1113 optimal_fiber_length=0.1125747 tendon_slack_length=0.1801195
        pennation_angle_at_optimal=0.1396263
      PathPoint P1: pelvis (-0.0743759 0.101965 -0.033222)
      PathPoint P2: pelvis (-0.0273593 -0.0655244 -0.0872509)
      ConditionalPathPoint P3: pelvis (-0.033107 -0.0925388 -0.0938033) socket_coordinate=/jointset/hip_l/hip_flexion_l
          range=(-1.5708 0.785398)
      PathPoint P4: femur_l (0.00165784 -0.0525327 -0.00393736)
      PathPoint P5: femur_l (-0.0194796 -0.061858 -0.0107759)
    Thelen2003Muscle quad_fem_l: max_isometric_force=381 optimal_fiber_length=0.06000208 tendon_slack_length=0.02666759
        pennation_angle_at_optimal=0
      PathPoint P1: pelvis (-0.131394 -0.132313 -0.0597766)
      PathPoint P2: femur_l (-0.0394772 -0.0371977 -0.037923)
    Thelen2003Muscle gem_l: max_isometric_force=164 optimal_fiber_length=0.02628054 tendon_slack_length=0.04270588
        pennation_angle_at_optimal=0
      PathPoint P1: pelvis (-0.130244 -0.0942631 -0.0820779)
      PathPoint P2: femur_l (-0.0147133 -0.00341929 -0.0459013)
    Thelen2003Muscle peri_l: max_isometric_force=444 optimal_fiber_length=0.02928814 tendon_slack_length=0.1295437
        pennation_angle_at_optimal=0.1745329
      PathPoint P1: pelvis (-0.160477 0.000344865 -0.0270144)
      PathPoint P2: pelvis (-0.137141 -0.0317276 -0.0755254)
      PathPoint P3: femur_l (-0.015335 -0.00373013 -0.0452796)
    Thelen2003Muscle rect_fem_l: max_isometric_force=1169 optimal_fiber_length=0.1185546 tendon_slack_length=0.3223854
        pennation_angle_at_optimal=0.08726646
      PathPoint P1: pelvis (-0.0339117 -0.035751 -0.111276)
      ConditionalPathPoint P2: femur_l (0.0346073 -0.417567 -0.00196868)
          socket_coordinate=/jointset/knee_l/knee_angle_l range=(-2.61799 -1.45997)
      MovingPathPoint P3: tibia_l_amputated socket_x_coordinate=/jointset/knee_l/knee_angle_l
          socket_y_coordinate=/jointset/knee_l/knee_angle_l socket_z_coordinate=/jointset/knee_l/knee_angle_l
        x_location: MultiplierFunction: scale=1.158578
          SimmSpline: x=(-2.0944 -1.99997 -1.5708 -1.45752 -1.39626 -1.0472 -0.698132 -0.526391 -0.349066 -0.174533 0 0.00017453 0.00034907 0.0279253 0.0872665 0.174533 2.0944)
              y=(0.0155805 0.0179938 0.0275081 0.0296564 0.0307615 0.0365695 0.0422074 0.0450902 0.048391 0.0534299 0.0617576 0.0617669 0.0617762 0.0633083 0.066994 0.0733035 0.0573481)
        y_location: MultiplierFunction: scale=1.158578
          SimmSpline: x=(-2.0944 -1.99997 -1.5708 -1.45752 -1.39626 -1.0472 -0.698132 -0.526391 -0.349066 -0.174533 0 0.00017453 0.00034907 0.0279253 0.0872665 0.174533 2.0944)
              y=(0.0234116 0.0237613 0.0251141 0.0252795 0.0253146 0.0249184 0.0242373 0.0238447 0.0234197 0.0227644 0.020984 0.0209814 0.0209788 0.0205225 0.0191754 0.0159554 -0.0673774)
        z_location: MultiplierFunction: scale=1.158578
          SimmSpline: x=(-2.0944 0.1745) y=(-0.0014 -0.0014)
    Thelen2003Muscle vas_int_l: max_isometric_force=5000 optimal_fiber_length=0.1095702 tendon_slack_length=0.1187863
        pennation_angle_at_optimal=0.05235988
      PathPoint P1: femur_l (0.0300483 -0.199355 -0.0321206)
      PathPoint P2: femur_l (0.0347109 -0.215933 -0.0295302)
      ConditionalPathPoint P3: femur_l (0.0355398 -0.417567 -0.00569881)
          socket_coordinate=/jointset/knee_l/knee_angle_l range=(-2.61799 -1.42)
      MovingPathPoint P4: tibia_l_amputated socket_x_coordinate=/jointset/knee_l/knee_angle_l
          socket_y_coordinate=/jointset/knee_l/knee_angle_l socket_z_coordinate=/jointset/knee_l/knee_angle_l
        x_location: MultiplierFunction: scale=1.158578
          SimmSpline: x=(-2.0944 -1.99997 -1.5708 -1.45752 -1.39626 -1.0472 -0.698132 -0.526391 -0.349066 -0.174533 0 0.00017453 0.00034907 0.0279253 0.0872665 0.174533 2.0944)
              y=(0.0082733 0.0106866 0.0202042 0.022353 0.0234583 0.0292715 0.0349465 0.037871 0.0412569 0.0465287 0.0554632 0.0554735 0.0554837 0.0571717 0.061272 0.0684368 0.0648818)
        y_location: MultiplierFunction: scale=1.158578
          SimmSpline: x=(-2.0944 -1.99997 -1.5708 -1.45752 -1.39626 -1.0472 -0.698132 -0.526391 -0.349066 -0.174533 0 0.00017453 0.00034907 0.0279253 0.0872665 0.174533 2.0944)
              y=(0.025599 0.0259487 0.0273124 0.0274796 0.0275151 0.0271363 0.0265737 0.0263073 0.0261187 0.0260129 0.0252923 0.0252911 0.0252898 0.0250526 0.0242191 0.0218288 -0.0685706)
        z_location: MultiplierFunction: scale=1.158578
          SimmSpline: x=(-2.0944 2.0944) y=(-0.0018 -0.0018)
    Thelen2003Muscle med_gas_l: max_isometric_force=2500 optimal_fiber_length=0.1035977 tendon_slack_length=0.4143908
        pennation_angle_at_optimal=0.296706
      PathPoint P1: femur_l (-0.0196868 -0.407102 0.0243495)
      ConditionalPathPoint P2: femur_l (-0.0310844 -0.416738 0.0267326) socket_coordinate=/jointset/knee_l/knee_angle_l
          range=(-0.785398 0.174533)
      PathPoint P3: tibia_l_amputated (-0.0289644 -0.173787 0.0177262)
    Thelen2003Muscle ercspn_r: max_isometric_force=2500 optimal_fiber_length=0.1316563 tendon_slack_length=0.03291408
        pennation_angle_at_optimal=0
      PathPoint P1: pelvis (-0.160937 0.0504653 0.0501204)
      PathPoint P2: torso (-0.0593143 0.118629 0.0259905)
    Thelen2003Muscle ercspn_l: max_isometric_force=2500 optimal_fiber_length=0.1316563 tendon_slack_length=0.03291408
        pennation_angle_at_optimal=0
      PathPoint P1: pelvis (-0.160937 0.0504653 -0.0501204)
      PathPoint P2: torso (-0.0593143 0.118629 -0.0259905)
    Thelen2003Muscle intobl_r: max_isometric_force=900 optimal_fiber_length=0.1102615 tendon_slack_length=0.1102615
        pennation_angle_at_optimal=0
      PathPoint P1: pelvis (-0.045982 0.0804685 0.133003)
      PathPoint P2: torso (0.075491 0.172551 0.0161766)
    Thelen2003Muscle intobl_l: max_isometric_force=900 optimal_fiber_length=0.1102615 tendon_slack_length=0.1102615
        pennation_angle_at_optimal=0
      PathPoint P1: pelvis (-0.045982 0.0804685 -0.133003)
      PathPoint P2: torso (0.075491 0.172551 -0.0161766)
    Thelen2003Muscle extobl_r: max_isometric_force=900 optimal_fiber_length=0.1335813 tendon_slack_length=0.1558448
        pennation_angle_at_optimal=0
      PathPoint P1: pelvis (-0.0344865 -0.0731114 0.0114955)
      PathPoint P2: torso (0.0700988 0.118629 0.118629)
    Thelen2003Muscle extobl_l: max_isometric_force=900 optimal_fiber_length=0.1335813 tendon_slack_length=0.1558448
        pennation_angle_at_optimal=0
      PathPoint P1: pelvis (-0.0344865 -0.0731114 -0.0114955)
      PathPoint P2: torso (0.0700988 0.118629 -0.118629)
    ObjectGroup R_hip_abd: members=(glut_max1_r glut_med1_r glut_med2_r glut_med3_r peri_r sar_r tfl_r)
    ObjectGroup R_hip_flex: members=(glut_med1_r grac_r iliacus_r pect_r psoas_r rect_fem_r sar_r tfl_r)
    ObjectGroup R_hip_inrot: members=(glut_med1_r iliacus_r psoas_r tfl_r)
    ObjectGroup R_hip_exrot: members=(gem_r glut_med3_r peri_r quad_fem_r)
    ObjectGroup R_hip_ext: members=(add_mag2_r bifemlh_r glut_max1_r glut_max2_r glut_max3_r glut_med3_r)
    ObjectGroup R_hip_add: members=(add_mag2_r bifemlh_r grac_r pect_r)
    ObjectGroup R_knee_bend: members=(bifemlh_r bifemsh_r grac_r med_gas_r sar_r)
    ObjectGroup R_knee_ext: members=(rect_fem_r vas_int_r)
    ObjectGroup R_ankle_pf: members=(med_gas_r soleus_r tib_post_r)
    ObjectGroup R_inverter: members=(tib_ant_r tib_post_r)
    ObjectGroup R_ankle_df: members=tib_ant_r
    ObjectGroup L_hip_abd: members=(glut_max1_l glut_med1_l glut_med2_l glut_med3_l peri_l sar_l tfl_l)
    ObjectGroup L_hip_flex: members=(glut_med1_l grac_l iliacus_l pect_l psoas_l rect_fem_l sar_l tfl_l)
    ObjectGroup L_hip_inrot: members=(glut_med1_l iliacus_l psoas_l tfl_l)
    ObjectGroup L_hip_exrot: members=(gem_l glut_med3_l peri_l quad_fem_l)
    ObjectGroup L_hip_ext: members=(add_mag2_l bifemlh_l glut_max1_l glut_max2_l glut_max3_l glut_med3_l)
    ObjectGroup L_hip_add: members=(add_mag2_l bifemlh_l grac_l pect_l)
    ObjectGroup L_knee_bend: members=(bifemlh_l bifemsh_l grac_l med_gas_l sar_l)
    ObjectGroup L_knee_ext: members=(rect_fem_l vas_int_l)
    ObjectGroup back_ext: members=(ercspn_l ercspn_r)
    ObjectGroup back_rlb: members=(ercspn_r extobl_r intobl_r)
    ObjectGroup back_introt: members=(ercspn_r extobl_l intobl_r)
    ObjectGroup back_llb: members=(ercspn_l extobl_l intobl_l)
    ObjectGroup back_extrot: members=(ercspn_l extobl_r intobl_l)
    ObjectGroup back_flex: members=(extobl_l extobl_r intobl_l intobl_r)
  MarkerSet:
    Marker R_AC: torso (-0.0404646 0.399787 0.247567)
    Marker L_AC: torso (-0.0630444 0.4444 -0.209712)
    Marker R_ASIS: pelvis (-0.0287519 0.0250718 0.176895)
    Marker L_ASIS: pelvis (-0.0182109 0.0064582 -0.179171)
    Marker R_PSIS: pelvis (-0.240473 0.0419952 0.0492749)
    Marker L_PSIS: pelvis (-0.229645 0.0571021 -0.0808977)
    Marker R_GT: femur_r (0.0275921 -0.00697521 0.109283)
    Marker L_GT: femur_l (0.0277513 -0.00835925 -0.131026)
    Marker R_IC: pelvis (-0.0639092 0.125734 0.199465)
    Marker L_IC: pelvis (-0.0608439 0.138696 -0.211679)
    Marker SACRAL: pelvis (-0.232028 0.00107162 -0.0166934)
    Marker R_THIGH_PROX_POST: femur_r (-0.0397538 -0.139895 0.0963895)
    Marker R_THIGH_PROX_ANT: femur_r (0.0292765 -0.120669 0.097053)
    Marker R_THIGH_DIST_ANT: femur_r (0.0335858 -0.211149 0.0886879)
    Marker R_THIGH_DIST_POST: femur_r (-0.0333826 -0.229232 0.0870572)
    Marker R_LAT_KNEE: femur_r (-0.0207229 -0.414459 0.0518074) fixed=true
    Marker R_MED_KNEE: femur_r (0 -0.418603 -0.0518074) fixed=true
    Marker R_SHANK_PROX_POST: tibia_r (-0.0847252 -0.186916 0.0731123)
    Marker R_SHANK_PROX_ANT: tibia_r (-0.0136178 -0.188034 0.0893649)
    Marker R_SHANK_DIST_ANT: tibia_r (-0.004124 -0.261751 0.0751401)
    Marker R_SHANK_DIST_POST: tibia_r (-0.059499 -0.26675 0.067868)
    Marker R_LAT_ANK: tibia_r (-0.00579289 -0.475017 0.0614046) fixed=true
    Marker R_MED_ANK: tibia_r (0.0148943 -0.463431 -0.0426559) fixed=true
    Marker R_HEEL_SUP: calcn_r (-0.0346811 0.0362015 -0.0137781)
    Marker R_HEEL_MED: calcn_r (-0.023886 0.00495169 -0.0336057)
    Marker R_HEEL_LAT: calcn_r (-0.0288883 0.0202159 0.0251398)
    Marker R_TOE: toes_r (0.0830926 0.0269774 -0.0015761)
    Marker L_THIGH_PROX_POST: femur_l (0.00270669 -0.146569 -0.112336)
    Marker L_THIGH_PROX_ANT: femur_l (0.0681696 -0.156738 -0.0824474)
    Marker L_THIGH_DIST_ANT: femur_l (0.0672521 -0.229742 -0.0716697)
    Marker L_THIGH_DIST_POST: femur_l (0.0071497 -0.222497 -0.0968838)
    Marker L_LAT_KNEE: pylon_socket (-0.0161898 0.224415 -0.0607017)
    Marker L_MED_KNEE: pylon_socket (0.00105448 0.209438 0.096774)
    Marker L_SHANK_PROX_POST: pylon_socket (-0.0165777 0.129598 -0.0612812)
    Marker L_SHANK_PROX_ANT: pylon_socket (0.0374508 0.13483 -0.0494337)
    Marker L_SHANK_DIST_ANT: pylon_socket (0.0356414 0.0792949 -0.0437659)
    Marker L_SHANK_DIST_POST: pylon_socket (-0.0159973 0.0659818 -0.0547819)
    Marker L_LAT_ANK: pylon_socket (-0.0192046 -0.253124 -0.0412389)
    Marker L_MED_ANK: pylon_socket (0.00687718 -0.240624 0.0246848)
    Marker L_HEEL_SUP: foot2 (-0.133059 -0.00841136 -0.0101483)
    Marker L_HEEL_MED: foot2 (-0.111572 -0.0272677 0.0219467)
    Marker L_HEEL_LAT: foot2 (-0.118339 -0.0261168 -0.0415066)
    Marker L_TOE: foot2 (0.183956 0.0432172 -0.00102949)
    Marker R_1ST_MET: toes_r (0.00077014 0.0183484 -0.0490515)
    Marker R_5TH_MET: toes_r (-0.0273673 0.0168731 0.0832701)
    Marker L_1ST_MET: foot2 (0.106025 0.0071259 0.048896)
    Marker L_5TH_MET: foot2 (0.0852762 -0.0024348 -0.0817201)
